# Расчет шнекового конвейера
# Исходные данные
# Материал - Каустическая сода
# Насыпная плотность материала
ρ_н := 1.57  # т/м^3
# Длина конвейера
L := 5  # м
# Угол наклона конвейера
f := 5 deg  # град.
# Производительность
Q := 33.3  # т/ч
# Коэффициент заполнения желоба
φ := 0.25
# Отношение шага винта к диаметру винта
E := 1
# Частота вращения винта
n := 60  # об/мин
# Коэффициент уменьшения производительности
# от наклона конвейера
R_β := 0.9
# Коэффициент абразивности
A := 45
# Наибольший размер кусков материала
a_max := 0.0005  # м
# Определяем необходимый диаметр винта по формуле:
D := 0.275*Q/(E*n*φ*ρ_н*R_β) explicit, ALL → 0.275*33.3/(60*0.25*1.57*0.9) = 0.432059  # м
# Проверяем частоту вращения:
n_max := A/sqrt(D) explicit, ALL → 45/sqrt(0.432059447983) = 68.4606  # об/мин
n ≤ n_max explicit, ALL → 60 ≤ 68.4606093813 = 1
# Проверяем диаметр винта:
# Коэффициент для рядового груза
k := 4
D > a_max*k explicit, ALL → 0.432059447983 > 0.0005*4 = 1
# Подбираем стандартный диаметр и шаг винта из таблицы
D_ст := 0.5  # м
S_ст := 0.5  # м
# Уточняем частоту оборотов
n_ст := 0.275*Q/(E*D_ст*φ*ρ_н*R_β) explicit, ALL → 0.275*33.3/(0.5*0.25*1.57*0.9) = 51.8471  # об/мин
# Проверяем частоту вращения
n_ст ≤ A/sqrt(D_ст) explicit, ALL → 51.847133758 ≤ 45/sqrt(0.5) = 1
# Таким образом, допустимая частота вращения винта
n_ст = 51.8471  # об/мин
# Определение мощности на валу винта
# Исходные данные
# Горизонтальная проекция длины конвейера
L_г := L*cos(f) explicit, ALL → 5*cos(5*deg) = 4.98097  # м
# Высота подъема
H := L*sin(f) explicit, ALL → 5*sin(5*deg) = 0.435779  # м
# Коэффициент сопротивления перемещению груза
ω := 2.5
# Коэффициент, учитывающий характер перемещения винта
R := 0.2
# Погонная масса вращающихся частей конвейера
g_k := 80*D_ст explicit, ALL → 80*0.5 = 40  # кг/м
# Коэффициент сопротивления движению вращающихся частей конвейера
ω_в := 0.16
# Осевая скорость движения груза
υ := S_ст*n_ст/60 explicit, ALL → 0.5*51.847133758/60 = 0.432059  # м/с
# Мощность на валу винта:
N_0 := Q/367*(L_г*ω + H) + 0.02*R*g_k*L_г*ω_в explicit, ALL → 33.3/367*(4.98097349046*2.5 + 0.435778713738) + 0.02*0.2*40*4.98097349046*0.16 = 1.29693  # кВт
# Определение мощности двигателя для привода шнекового конвейера
# Исходные данные
# Коэффициент запаса мощности для приводов шнеков
K := 1.25
# КПД привода
η := 0.85
# Мощность двигателя:
N := K*N_0/η explicit, ALL → 1.25*1.29693383211/0.85 = 1.90726  # кВт
