# Расчет шнекового конвейера
# Исходные данные
# Материал - Каустическая сода
# Насыпная плотность материала
ρ_н := 2.13  # т/м^3
# Длина конвейера
L := 3
# Угол наклона конвейера
f := 15 deg
# Производительность
Q := 3  # т/ч
# Коэффициент заполнения желоба
φ := 0.25
# Отношение шага винта к диаметру винта
E := 0.8
# Частота вращения винта
n := 30  # об/мин
# Коэффициент уменьшения производительности
# от наклона конвейера
R_β := 0.7
# Коэффициент абразивности
A := 45
# Наибольший размер кусков материала
a_max := 0.0005  # м
# Определяем необходимый диаметр винта по формуле:
D := 0.275*Q/(E*n*φ*ρ_н*R_β) explicit, ALL → 0.275*3/(0.8*30*0.25*2.13*0.7) float, 2 → 0.092  # м
# Проверяем частоту вращения:
n_max := A/sqrt(D) explicit, ALL → 45/sqrt(0.092) float, 4 → 148.4  # об/мин
n ≤ n_max explicit, ALL → 30 ≤ 148.4 = 1
# Проверяем диаметр винта:
# Коэффициент для рядового груза
k := 4
D > a_max*k explicit, ALL → 0.092 > 0.0005*4 = 1
# Подбираем стандартный диаметр и шаг винта из таблицы
D_ст := 0.1  # м
S_ст := 0.08  # м
# Уточняем частоту оборотов
n_ст := 0.275*Q/(E*D_ст*φ*ρ_н*R_β) explicit, ALL → 0.275*3/(0.8*0.1*0.25*2.13*0.7) float, 4 → 27.67  # об/мин
# Проверяем частоту вращения
n_ст ≤ A/sqrt(D_ст) explicit, ALL → 27.67 ≤ 45/sqrt(0.1) = 1
# Таким образом, допустимая частота вращения винта
n_ст = 27.67  # об/мин
# Определение мощности на валу винта
# Исходные данные
# Горизонтальная проекция длины конвейера
L_г1 := L*cos(f) explicit, ALL → 3*cos(15*deg) = 2.89778  # м
L_г := L_г1 float, 3 → 2.9  # м
# Высота подъема
H_1 := L*sin(f) explicit, ALL → 3*sin(15*deg) = 0.776457  # м
H := H_1 float, 2 → 0.78  # м
# Коэффициент сопротивления перемещению груза
ω := 2.5
# Коэффициент, учитывающий характер перемещения винта
R := 0.2
# Погонная масса вращающихся частей конвейера
g_k := 80*D_ст explicit, ALL → 80*0.1 = 8  # кг/м
# Коэффициент сопротивления движению вращающихся частей конвейера
ω_в := 0.16
# Осевая скорость движения груза
υ := S_ст*n_ст/60 explicit, ALL → 0.08*27.67/60 = 0.0368933  # м/с
# Мощность на валу винта:
N_0 := Q/367*(L_г*ω + H) + 0.02*R*g_k*L_г*ω_в explicit, ALL → 3/367*(2.9*2.5 + 0.78) + 0.02*0.2*8*2.9*0.16 float, 2 → 0.08  # кВт
# Определение мощности двигателя для привода шнекового конвейера
# Исходные данные
# Коэффициент запаса мощности для приводов шнеков
K := 1.25
# КПД привода
η := 0.85
# Мощность двигателя:
N := K*N_0/η explicit, ALL → 1.25*0.08/0.85 = 0.117647  # кВт
