# Расчет шнекового конвейера
# Исходные данные
# Материал - Каустическая сода
# Насыпная плотность материала
ρ_н := 1.57  # т/м^3
# Длина конвейера
L := 5  # м
# Угол наклона конвейера
f := 5  # град.
# Производительность
Q := 33.3  # т/ч
# Коэффициент заполнения желоба
φ := 0.25
# Отношение шага винта к диаметру винта
E := 1
# Частота вращения винта
n := 60  # об/мин
# Коэффициент уменьшения производительности
# от наклона конвейера
R_β := 0.9
# Коэффициент абразивности
A := 45
# Наибольший размер кусков материала
a_max := 0.0005  # м
# Определяем необходимый диаметр винта по формуле:
D := 0.275*Q/(E*n*φ*ρ_н*R_β) explicit, ALL → 0.275*33.3/(60*0.25*1.57*0.9) = 0.432059  # м
# Проверяем частоту вращения
n_max := A/sqrt(D) explicit, ALL → 45/sqrt(0.432059447983) = 68.4606  # об/мин
n ≤ n_max explicit, ALL → 60 ≤ 68.4606093813 = 1
# Проверяем диаметр винта
# Коэффициент для рядового груза
k := 4
D > a_max*k explicit, ALL → 0.432059447983 > 0.0005*4 = 1
# Подбираем стандартный диаметр и шаг винта из таблицы
D_ст := 0.5  # м
S_ст := 0.5  # м
# Уточняем частоту оборотов
n_ст := 0.275*Q/(E*D_ст*φ*ρ_н*R_β) explicit, ALL → 0.275*33.3/(0.5*0.25*1.57*0.9) = 51.8471  # об/мин
# Проверяем частоту вращения
n_ст ≤ A/sqrt(D_ст) explicit, ALL → 51.847133758 ≤ 45/sqrt(0.5) = 1
# Таким образом, допустимая частота вращения винта
n_ст = 51.8471  # об/мин
# Определение мощности на валу винта
# Горизонтальная проекция длины конвейера
L_г := 4.981  # м
# Высота подъема
H := 0.436  # м
# Коэффициент сопротивления перемещению груза
ω := 2.5
# Коэффициент, учитывающий характер перемещения винта
R := 0.2
# Погонная масса вращающихся частей конвейера
g_k := 40  # кг/м
# Коэффициент сопротивления движению вращающихся частей конвейера
ω_в := 0.16
N_0 := Q/367*(L_г*ω + H) + 0.02*R*g_k*L_г*ω_в explicit, ALL → 33.3/367*(4.981*2.5 + 0.436) + 0.02*0.2*40*4.981*0.16 = 1.29696
